// SBML level 2 version 4

function Constant_flux__irreversible(v)
  v;
end
Constant_flux__irreversible is "Constant flux (irreversible)";

model Harmselator_1()

  // Compartments:
  compartment compartment = 1;

  // Species:
  species FP in compartment = 0.14;
  species Pip in compartment = 0;
  species trig in compartment = 0.004;
  species DBF in compartment = 0;
  species FI in compartment = 0.04;
  species FIOH in compartment = 0;
  species PipAc in compartment = 0;
  species SI in compartment = 0.28;
  species SIOH in compartment = 0;
  species FIO in compartment = 0;
  species trigH in compartment = 0;

  // Reactions:
  Trig: trig + FP => Pip + trig + DBF; compartment*Trig_k1*trig*FP; Trig is "Initiation";
    Trig_k1 = 0.0202;
  Autocatalysis: FP + Pip => 2 Pip + DBF; compartment*Autocatalysis_k1*FP*Pip;
    Autocatalysis_k1 = 0.602;
  Fast_Inhib: Pip + FI => PipAc + FIOH; compartment*Fast_Inhib_k1*Pip*FI;
    Fast_Inhib_k1 = 220;
  Slow_Inhib: Pip + SI => PipAc + SIOH; compartment*Slow_Inhib_k1*Pip*SI;
    Slow_Inhib_k1 = 0.00275;

  // Unit definitions:
  unit length = metre;
  unit area = metre^2;
  unit volume = litre;
  unit time = second;
  unit substance = mole;
end
