// SBML level 2 version 4

function Constant_flux__irreversible(v)
  v;
end
Constant_flux__irreversible is "Constant flux (irreversible)";

model Harmselator_1()

  // Compartments:
  compartment compartment = 1;

  // Species:
  species FP in compartment = 0.14;
  species Pip in compartment = 0;
  species trig in compartment = 0.004;
  species DBF in compartment = 0;
  species FI in compartment = 0.04;
  species FIOH in compartment = 0;
  species PipAc in compartment = 0;
  species SI in compartment = 0.28;
  species SIOH in compartment = 0;
  species FIO in compartment = 0;
  species trigH in compartment = 0;

  // Reactions:
  Trig: trig + FP => Pip + trig + DBF; compartment*Trig_k1*trig*FP; Trig is "Initiation";
    Trig_k1 = 0.0202;
  Autocatalysis: FP + Pip => 2 Pip + DBF; compartment*Autocatalysis_k1*FP*Pip;
    Autocatalysis_k1 = 0.602;
  Fast_Inhib: Pip + FI => PipAc + FIOH; compartment*Fast_Inhib_k1*Pip*FI;
    Fast_Inhib_k1 = 220;
  Slow_Inhib: Pip + SI => PipAc + SIOH; compartment*Slow_Inhib_k1*Pip*SI;
    Slow_Inhib_k1 = 0.00275;
  Flow_in_FP: => FP; compartment*Constant_flux__irreversible(Flow_in_FP_v);
    Flow_in_FP_v = 1.4e-5;
  Flow_out_FP: FP => ; compartment*Flow_out_FP_k1*FP;
    Flow_out_FP_k1 = 0.0001;
  Flow_in_trig: => trig; compartment*Constant_flux__irreversible(Flow_in_trig_v);
    Flow_in_trig_v = 4e-7;
  Flow_out_trig: trig => ; compartment*Flow_out_trig_k1*trig;
    Flow_out_trig_k1 = 0.0001;
  Flow_in_FI: => FI; compartment*Constant_flux__irreversible(Flow_in_FI_v);
    Flow_in_FI_v = 4e-6;
  Flow_out_FI: FI => ; compartment*Flow_out_FI_k1*FI;
    Flow_out_FI_k1 = 0.0001;
  Flow_in_SI: => SI; compartment*Constant_flux__irreversible(Flow_in_SI_v);
    Flow_in_SI_v = 2.8e-5;
  Flow_out_SI: SI => ; compartment*Flow_out_SI_k1*SI;
    Flow_out_SI_k1 = 0.0001;
  Flow_out_DBF: DBF => ; compartment*Flow_out_DBF_k1*DBF;
    Flow_out_DBF_k1 = 0.0001;
  Flow_out_FIOH: FIOH => ; compartment*Flow_out_FIOH_k1*FIOH;
    Flow_out_FIOH_k1 = 0.0001;
  Flow_out_SIOH: SIOH => ; compartment*Flow_out_SIOH_k1*SIOH;
    Flow_out_SIOH_k1 = 0.0001;
  Flow_out_PipAc: PipAc => ; compartment*Flow_out_PipAc_k1*PipAc;
    Flow_out_PipAc_k1 = 0.0001;
  Flow_out_Pip: Pip => ; compartment*Flow_out_Pip_k1*Pip;
    Flow_out_Pip_k1 = 0.0001;

  // Unit definitions:
  unit length = metre;
  unit area = metre^2;
  unit volume = litre;
  unit time = second;
  unit substance = mole;
end
